*NODE
1, -180.000003814697, 119.999999236315, 300.
2, -180.000003814697, 119.999999236315, 330.
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*NSET, NSET="Fixed (26)-1"
13, 14, 15, 16, 101, 102
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*NSET, NSET="Point_A (29)-1"
19
*NSET, NSET="Point_O (32)-1"
103
*ELEMENT, TYPE=C3D4
1, 218, 220, 73, 465
2, 180, 197, 234, 237
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*ELSET, ELSET="Solid Section1-1"
1, 2, 3, 4, 5, 6
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*MATERIAL, NAME="FC300 --- SHARED"
*ELASTIC, TYPE=ISOTROPIC
130000000., 0.27
*DENSITY
7.4e-06
*PLASTIC, HARDENING=ISOTROPIC
220594., 0.
*EXPANSION, TYPE=ISOTROPIC, ZERO=0.
1.2e-05
*SOLID SECTION, MATERIAL="FC300 --- SHARED", ELSET="Solid Section1-1"
1.
