*NODE
1, 0., 0., 0.
2, 0., 0., 150.
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*NSET, NSET="Fixed (26)-1"
1, 3, 5, 7, 24, 25
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*NSET, NSET="Force (29)-1"
2
*ELEMENT, TYPE=C3D4
1, 1, 24, 89, 9
2, 93, 24, 9, 291
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*ELSET, ELSET="Solid Section1-1"
1, 2, 3, 4, 5, 6
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*SURFACE, NAME="Geometric Group.3 (32)-1", TYPE=ELEMENT
31, S1
67, S1
68, S1
80, S1
84, S1
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326, S4
*MATERIAL, NAME="FC300 --- SHARED"
*ELASTIC, TYPE=ISOTROPIC
130000000., 0.27
*DENSITY
7.4e-06
*PLASTIC, HARDENING=ISOTROPIC
220594., 0.
*EXPANSION, TYPE=ISOTROPIC, ZERO=0.
1.2e-05
*SOLID SECTION, MATERIAL="FC300 --- SHARED", ELSET="Solid Section1-1"
1.
